E := 4
tи := 5*10^-6
T := 40*10^-6
t := -T/2, -T/2 + tи/100 .. T/2
S(t) := E*exp(-|t|/tи)
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t := -1.5*T, -1.5*T + tи/100 .. 1.5*T
Sp(t) := sum(S(t - k*T), k = -2 .. 2)
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n := 0 .. 30
Ω := 2*π/T
i := sqrt(-1)
f[n] := n/T
b[n] := 0
A[0] := 2/T*integral(Sp(t), t = 0 .. T/2)
a[n] := 4/T*integral(Sp(t)*cos(n*Ω*t), t = 0 .. T/2)
A[n] := |a[n] - i*b[n]|
ϕ[n] := arg(a[n] - i*b[n])
a[0]/2 = 1
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N := 8
s(t) := a[0]^2/2^2 + sum((a[n]*cos(n*Ω*t))^2, n = 1 .. N)
Pcp := 1/T*integral(s(t), t = -T/2 .. T/2)
Pcp = 2.00932
Pa := (a[0]/2)^2 + sum(A[n]^2/2, n = 1 .. N)
Pa = 2.00932
Sp1(t) := a[0]/2 + sum(a[n]*cos(n*Ω*t), n = 1 .. N)
A[8] = 0.049409
f[8] = 200000
t := -1.5*T, -1.5*T + tи/100 .. 1.5*T
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Δ := 1/T*integral((Sp(t) - Sp1(t))^2, t = 0 .. T)
Δ = 0.00275966
Fm := 2*f[8]
df := 0.01*Fm
fs := 0, df .. 1*Fm
t := -1.5*T/2, -1.5*T/2 + tи/100 .. 1.5*T/2
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as(fs) := 2*integral(S(t)*cos(2*π*fs*t), t = 0 .. 0.5*T)
Sf(fs) := |as(fs)|
ϕs(fs) := if(as(fs) > 0, 0, π)
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i := sqrt(-1)
R := 3*10^3
C := 2*10^-9
ω1 := 30
ω := 0, ω1/500 .. ω1
Z1(ω) := R*1/(i*ω*C)/(R + 1/(i*ω*C))
Z2(ω) := R*1/(i*ω*C)/(R + 1/(i*ω*C))
K(ω) := Z2(ω)/(Z1(ω) + Z2(ω))
Ac(ω) := |K(ω)|
Ψ(ω) := arg(K(ω))
fc(ω) := ω/(2*π)
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Kmax := 0.5
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t := -1.5*T, -1.5*T + tи/100 .. 1.5*T
K(fs) := Z2(fs)/(Z1(fs) + Z2(fs))
ϕ[n] := arg(a[n] - i*b[n])
K0 := 0.5
A[0] = 2
f[0] = 0
ϕk(fs) := if(K(fs) ≠ 0, arg(K(fs)), 0)
Sвых(t) := A[0]*K0 + sum(A[n]*|K(f[n])|*cos(2*π*f[n]*t + ϕ[n] + ϕk(f[n])), n = 1 .. N)
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f[n] = [
    0; 25000; 50000; 75000; 100000; 125000; 150000; 175000; 200000; 225000
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]
